# mesoscopic heat conduction
# heat flow from hot right region to cold left region
# compare the temperature profile at the end opf the simulation,
# contained in file dump.last, to analytic solution.
#
#
dimension       2
units		si
atom_style	meso/multiphase
boundary        f f p

# Adding a new property - need to be added before simulation box
fix   	        prop all property/atom d_cA d_dcA d_DA d_cAeq d_RA d_dmA d_mAthres ghost yes

variable        dt equal 0.01
variable 	T equal 10.00
variable 	nrun equal ${T}/${dt}

variable        dx equal 0.005
variable        h equal 3*${dx}
variable	d equal 1.0*${h}
variable 	sph_rho equal 1.0
variable        sph_mass equal ${sph_rho}*${dx}^2
variable	mass_thres equal 2.0*${sph_mass}

lattice		sq ${dx} origin 0.5 0.5 0
region		box block 0 1.0 0 1.0 0 ${dx} units box
create_box	2 box
create_atoms 	1 box
# create_atoms 	1 random 10000 12345 NULL

region          left  block EDGE 0.5 EDGE EDGE EDGE EDGE units box
region          right block 0.5 EDGE EDGE EDGE EDGE EDGE units box

# Set some group
group 	        gleft region left # left is liquid
group		gright region right # right is solid

# Setting the properties for the region
set		region left type 1 # liquid is left
set		region right type 2 # solid is right

set		atom * meso/rho ${sph_rho}
set	        atom * mass ${sph_mass}

set             region left d_cA 1.0
set             region right d_cA 0.0
set		atom * d_dcA 0.0
set		atom * d_dmA 0.0
set		atom * d_DA 1.0e-4 # diffusion coefficient
set		atom * d_cAeq 0.0 # equilibrium concentration
set		atom * d_RA 1.0 # Interacting between solid and liquid
set		atom * d_mAthres ${mass_thres} # threshold mass to convert to solid

pair_style      sph/concAprecipitation/multiphase
#               i j cutoff
# There seems to be problem with large value of either constants
# TODO: Figure it out
pair_coeff      * * 	      ${h} ${d}

timestep        ${dt}
neighbor	0 bin
fix             integrate_fix all meso/stationary
fix 		concentration_fix all meso/concentrationA
fix		constant_concentration gleft meso/constantconcentrationA

dump		dump_fix all custom 10 dump.heat id type x y z d_cA
dump_modify     dump_fix first yes
run             ${nrun}
undump          dump_fix

dump		dump_fix all custom 10 dump_${T}.last.xs id type xs ys zs d_cA
dump_modify     dump_fix first yes
run             0
undump          dump_fix
